# OpenSim document version 30000
FunctionSet:
  # These initial guesses for the torque trajectories are based on
  # empirical data (i.e., photos & video).
  # Hard twist for anterior flip, braking, hard twist for posterior
  SimmSpline twist_actuator: x=(0 0.2 0.4 0.6 0.8) y=(0 0.1 -0.02 -0.1 0.05)
  SimmSpline hunch_actuator: x=(0 0.2 0.4 0.6 0.8) y=(0 -0.03 0 0.05 -0.03)
  SimmSpline wag_actuator: x=(0 0.2 0.4 0.6 0.8) y=(0 -0.02 0 0.02 0)
  # Pull in (starting before twist), push out for "Superman", pull
  SimmSpline frontLegs_actuator: x=(0 0.2 0.4 0.6 0.8) y=(-0.025 -0.08 0.025 0.08 -0.04)
  SimmSpline backLegs_actuator: x=(0 0.2 0.4 0.6 0.8) y=(0 0 0.05 0.08 -0.05)
